<?xml version="1.0"?>
<?xml-stylesheet type="text/xsl" href="http://jsbsim.sourceforge.net/JSBSim.xsl"?>
<fdm_config name="ZivkoEdge540" version="2.0" release="ALPHA"
   xmlns:xsi="http://www.w3.org/2001/XMLSchema-instance"
   xsi:noNamespaceSchemaLocation="http://jsbsim.sourceforge.net/JSBSim.xsd">

 <fileheader>
  <author>Torsten Dreyer</author>
  <filecreationdate> 2008-02-06 </filecreationdate>
  <version>$Revison: $</version>
  <description>Zivko Edge 540 aerobatic plane</description>
 </fileheader>

 <metrics>
   <wingarea  unit="FT2">   98.00 </wingarea>
   <wingspan  unit="FT" >   24.30 </wingspan>
   <wing_incidence>          0.00 </wing_incidence>
   <chord     unit="FT" >    4.03 </chord>
   <htailarea unit="FT2">   15.68 </htailarea>
   <htailarm  unit="FT" >   10.66 </htailarm>
   <vtailarea unit="FT2">    9.80 </vtailarea>
   <vtailarm  unit="FT" >   10.25 </vtailarm>
   <location name="AERORP" unit="M">
     <x>-1.128</x>
     <y>0.00</y>
     <z>0.117</z>
   </location>
   <location name="EYEPOINT" unit="M">
     <x>0.469985</x>
     <y>0.0</y>
     <z>0.413371</z>
   </location>
   <location name="VRP" unit="IN">
     <x>0</x>
     <y>0</y>
     <z>0</z>
   </location>
 </metrics>

 <mass_balance>
   <ixx unit="SLUG*FT2">       661 </ixx>
   <iyy unit="SLUG*FT2">       857 </iyy>
   <izz unit="SLUG*FT2">       842 </izz>
   <emptywt unit="LBS" >      1080 </emptywt>
   <location name="CG" unit="M">
     <x>-1.228</x>
     <y>0.00</y>
     <z>0.117</z>
   </location>
 </mass_balance>

<!--
  x points towards back
  y points towards right
  z points up
-->
 <ground_reactions>

  <contact type="BOGEY" name="LEFT_MAIN">
   <location unit="M">
     <x>-1.46362</x>
     <y>-0.924997</y>
     <z>-1.08533</z>
   </location>
   <static_friction>  0.95 </static_friction>
   <dynamic_friction> 0.80 </dynamic_friction>
   <rolling_friction> 0.02 </rolling_friction>
   <spring_coeff unit="LBS/FT">       2500.00 </spring_coeff>
   <damping_coeff unit="LBS/FT/SEC">   360.00 </damping_coeff>
   <max_steer unit="DEG">0</max_steer>
   <brake_group>LEFT</brake_group>
   <retractable>0</retractable>
 </contact>

  <contact type="BOGEY" name="RIGHT_MAIN">
   <location unit="M">
     <x>-1.46362</x>
     <y> 0.924997</y>
     <z>-1.08533</z>
   </location>
   <static_friction>  0.95 </static_friction>
   <dynamic_friction> 0.80 </dynamic_friction>
   <rolling_friction> 0.02 </rolling_friction>
   <spring_coeff unit="LBS/FT">       2500.00 </spring_coeff>
   <damping_coeff unit="LBS/FT/SEC">   360.00 </damping_coeff>
   <max_steer unit="DEG">0</max_steer>
   <brake_group>RIGHT</brake_group>
   <retractable>0</retractable>
 </contact>

  <contact type="BOGEY" name="TAIL">
   <location unit="M">
     <x> 3.24919 </x>
     <y>   0.00 </y>
     <z> -0.243471 </z>
   </location>
   <static_friction>  0.80 </static_friction>
   <dynamic_friction> 0.70 </dynamic_friction>
   <rolling_friction> 0.02 </rolling_friction>
   <spring_coeff unit="LBS/FT">       800.00 </spring_coeff>
   <damping_coeff unit="LBS/FT/SEC">  040.00 </damping_coeff>
   <max_steer unit="DEG"> 0.00 </max_steer>
   <brake_group>NONE</brake_group>
   <retractable>0</retractable>
 </contact>

  <contact type="STRUCTURE" name="NOSE">
    <location unit="M">
     <x>-3.75356 </x>
     <y>0</y>
     <z>0.298074</z>
    </location>
    <static_friction>  0.80 </static_friction>
    <dynamic_friction> 0.50 </dynamic_friction>
    <spring_coeff unit="LBS/FT">       1800.00 </spring_coeff>
    <damping_coeff unit="LBS/FT/SEC">   360.00 </damping_coeff>
  </contact>

  <contact type="STRUCTURE" name="LEFT_WING">
    <location unit="M">
     <x>-1.18192</x>
     <y>-3.35525</y>
     <z>-0.087068</z>
    </location>
    <static_friction>  0.80 </static_friction>
    <dynamic_friction> 0.50 </dynamic_friction>
    <spring_coeff unit="LBS/FT">       1800.00 </spring_coeff>
    <damping_coeff unit="LBS/FT/SEC">   360.00 </damping_coeff>
  </contact>

  <contact type="STRUCTURE" name="RIGHT_WING">
    <location unit="M">
     <x>-1.18192</x>
     <y>3.35525</y>
     <z>-0.087068</z>
    </location>
    <static_friction>  0.80 </static_friction>
    <dynamic_friction> 0.50 </dynamic_friction>
    <spring_coeff unit="LBS/FT">       1800.00 </spring_coeff>
    <damping_coeff unit="LBS/FT/SEC">   360.00 </damping_coeff>
 </contact>

  <contact type="STRUCTURE" name="TAIL">
    <location unit="M">
     <x>3.04146</x>
     <y>0</y>
     <z>1.07735</z>
    </location>
    <static_friction>  0.80 </static_friction>
    <dynamic_friction> 0.50 </dynamic_friction>
    <spring_coeff unit="LBS/FT">       1800.00 </spring_coeff>
    <damping_coeff unit="LBS/FT/SEC">   360.00 </damping_coeff>
 </contact>

 </ground_reactions>

 <propulsion>

   <engine file="io540">
    <location unit="IN">
      <x>-20.0</x>
      <y>0.0</y>
      <z>4.65</z>
    </location>
    <orient unit="DEG">
      <pitch> 0.00 </pitch>
      <roll>   0.00 </roll>
      <yaw>   0.00 </yaw>
    </orient>
    <feed>3</feed>
    <thruster file="prop">
     <location unit="IN">
       <x>-41.8</x>
       <y>0</y>
       <z>4.65</z>
     </location>
     <orient unit="DEG">
       <pitch> 0.00 </pitch>
       <roll>   0.00 </roll>
       <yaw>   0.00 </yaw>
     </orient>
    </thruster>
  </engine>


  <!-- left wing 79ltr-->
  <tank type="FUEL" number="0">
     <location unit="M">
       <x>-0.81895</x>
       <y>-1.168402</y>
       <z> 0.1278</z>
     </location>
     <density unit="LBS/GAL"> 6.02 </density> <!-- Avgas -->
     <capacity unit="LBS">125.0</capacity>
     <contents unit="LBS">66.0</contents>
  </tank>

  <!-- fuselage 71ltr-->
  <tank type="FUEL" number="1">
     <location unit="M">
       <x>-1.31519</x>
       <y>0.00000</y>
       <z>0.0516</z>
     </location>
     <density unit="LBS/GAL"> 6.02 </density> <!-- Avgas -->
     <capacity unit="LBS">112.0</capacity>
     <contents unit="LBS">66.0</contents>
  </tank>

  <!-- right wing 79ltr-->
  <tank type="FUEL" number="2">
     <location unit="M">
       <x>-0.81895</x>
       <y> 1.168402</y>
       <z> 0.1278</z>
     </location>
     <density unit="LBS/GAL"> 6.02 </density> <!-- Avgas -->
     <capacity unit="LBS">125.0</capacity>
     <contents unit="LBS">66.0</contents>
  </tank>

  <!-- feed tank-->
  <tank type="FUEL" number="3">
     <location unit="M">
       <x>-1.31519</x>
       <y>0.00000</y>
       <z>0.0516</z>
     </location>
     <priority>1</priority>
     <density unit="LBS/GAL"> 6.02 </density> <!-- Avgas -->
     <capacity unit="LBS">1.0</capacity>
     <contents unit="LBS">1.0</contents>
  </tank>

 </propulsion>

 <flight_control name="FCS: ZivkoEdge540">

  <channel name="Pitch">
   <summer name="Pitch Trim Sum">
      <input>fcs/elevator-cmd-norm</input>
      <input>fcs/pitch-trim-cmd-norm</input>
      <clipto>
        <min> -1 </min>
        <max>  1 </max>
      </clipto>
   </summer>

   <aerosurface_scale name="Elevator Control">
      <input>fcs/pitch-trim-sum</input>
      <range>
        <min> -0.35 </min>
        <max>  0.35 </max>
      </range>
      <output>fcs/elevator-pos-rad</output>
   </aerosurface_scale>

   <aerosurface_scale name="elevator normalization">
      <input>fcs/elevator-pos-rad</input>
      <domain>
        <min> -0.35 </min>
        <max>  0.35 </max>
      </domain>
      <range>
        <min> -1 </min>
        <max>  1 </max>
      </range>
      <output>fcs/elevator-pos-norm</output>
   </aerosurface_scale>

  </channel>

  <channel name="Roll">
   <summer name="Roll Trim Sum">
      <input>fcs/aileron-cmd-norm</input>
      <input>fcs/roll-trim-cmd-norm</input>
      <clipto>
        <min> -1 </min>
        <max>  1 </max>
      </clipto>
   </summer>

   <aerosurface_scale name="Left Aileron Control">
      <input>fcs/roll-trim-sum</input>
      <range>
        <min> -0.35 </min>
        <max>  0.35 </max>
      </range>
      <output>fcs/left-aileron-pos-rad</output>
   </aerosurface_scale>

   <aerosurface_scale name="Right Aileron Control">
      <input>fcs/roll-trim-sum</input>
      <range>
        <min> -0.35 </min>
        <max>  0.35 </max>
      </range>
      <output>fcs/right-aileron-pos-rad</output>
   </aerosurface_scale>

   <aerosurface_scale name="left aileron normalization">
      <input>fcs/left-aileron-pos-rad</input>
      <domain>
        <min> -0.35 </min>
        <max>  0.35 </max>
      </domain>
      <range>
        <min> -1 </min>
        <max>  1 </max>
      </range>
      <output>fcs/left-aileron-pos-norm</output>
   </aerosurface_scale>

   <aerosurface_scale name="right aileron normalization">
      <input>fcs/right-aileron-pos-rad</input>
      <domain>
        <min> -0.35 </min>
        <max>  0.35 </max>
      </domain>
      <range>
        <min> -1 </min>
        <max>  1 </max>
      </range>
      <output>fcs/right-aileron-pos-norm</output>
   </aerosurface_scale>

  </channel>

  <channel name="Yaw">
   <summer name="Rudder Command Sum">
      <input>fcs/rudder-cmd-norm</input>
      <input>fcs/yaw-trim-cmd-norm</input>
      <clipto>
        <min> -1.0 </min>
        <max>  1.0 </max>
      </clipto>
      <output>fcs/rudder-pos-norm</output>
   </summer>

   <pure_gain name="Rudder Position Degree">
      <input>fcs/rudder-pos-norm</input>
      <gain>30.0</gain>
      <output>fcs/rudder-pos-deg</output>
   </pure_gain>

   <pure_gain name="Rudder Position Radians">
      <input>fcs/rudder-pos-deg</input>
      <gain>0.0174532925</gain>
      <output>fcs/rudder-pos-rad</output>
   </pure_gain>

   <sensor name="propulsion/engine/cylinder[0]/cht-sensor">
     <input> propulsion/engine/cht-degF </input>
     <lag> 1 </lag>
     <bias> -6 </bias>
     <output>propulsion/engine/cylinder[0]/cht-degf</output>
   </sensor>

   <sensor name="propulsion/engine/cylinder[1]/cht-sensor">
     <input> propulsion/engine/cht-degF </input>
     <lag> 0 </lag>
     <bias> -8 </bias>
     <output>propulsion/engine/cylinder[1]/cht-degf</output>
   </sensor>

   <sensor name="propulsion/engine/cylinder[2]/cht-sensor">
     <input> propulsion/engine/cht-degF </input>
     <lag> 4 </lag>
     <output>propulsion/engine/cylinder[2]/cht-degf</output>
   </sensor>

   <sensor name="propulsion/engine/cylinder[3]/cht-sensor">
     <input> propulsion/engine/cht-degF </input>
     <lag> 6 </lag>
     <output>propulsion/engine/cylinder[3]/cht-degf</output>
   </sensor>

   <sensor name="propulsion/engine/cylinder[4]/cht-sensor">
     <input> propulsion/engine/cht-degF </input>
     <lag> 8 </lag>
     <bias> 10 </bias>
     <output>propulsion/engine/cylinder[4]/cht-degf</output>
   </sensor>

   <sensor name="propulsion/engine/cylinder[5]/cht-sensor">
     <input> propulsion/engine/cht-degF </input>
     <lag> 5 </lag>
     <bias> 12 </bias>
     <output>propulsion/engine/cylinder[5]/cht-degf</output>
   </sensor>

   <sensor name="propulsion/engine/cylinder[0]/egt-sensor">
     <input> propulsion/engine/egt-degF </input>
     <lag> 4 </lag>
     <bias> -6 </bias>
     <output>propulsion/engine/cylinder[0]/egt-degf</output>
   </sensor>

   <sensor name="propulsion/engine/cylinder[1]/egt-sensor">
     <input> propulsion/engine/egt-degF </input>
     <lag> 3 </lag>
     <bias> -8 </bias>
     <output>propulsion/engine/cylinder[1]/egt-degf</output>
   </sensor>

   <sensor name="propulsion/engine/cylinder[2]/egt-sensor">
     <input> propulsion/engine/egt-degF </input>
     <lag> 6 </lag>
     <output>propulsion/engine/cylinder[2]/egt-degf</output>
   </sensor>

   <sensor name="propulsion/engine/cylinder[3]/egt-sensor">
     <input> propulsion/engine/egt-degF </input>
     <lag> 5 </lag>
     <output>propulsion/engine/cylinder[3]/egt-degf</output>
   </sensor>

   <sensor name="propulsion/engine/cylinder[4]/egt-sensor">
     <input> propulsion/engine/egt-degF </input>
     <lag> 8 </lag>
     <bias> 10 </bias>
     <output>propulsion/engine/cylinder[4]/egt-degf</output>
   </sensor>

   <sensor name="propulsion/engine/cylinder[5]/egt-sensor">
     <input> propulsion/engine/egt-degF </input>
     <lag> 7 </lag>
     <bias> 12 </bias>
     <output>propulsion/engine/cylinder[5]/egt-degf</output>
   </sensor>


  </channel>

 </flight_control>

 <aerodynamics>

<!-- Sustentacion -->
  <axis name="LIFT">

    <function name="aero/coefficient/CLalpha">
      <description>Lift_due_to_alpha</description>
      <product>
          <property>aero/qbar-psf</property>
          <property>metrics/Sw-sqft</property>
          <table>
            <independentVar lookup="row">aero/alpha-rad</independentVar>
            <tableData>
              -0.20 -0.750
               0.00 0.07
             0.23    1.200
               0.60 0.710
            </tableData>
          </table>
      </product>
    </function>

    <function name="aero/coefficient/dCLflap">
       <description>Delta_Lift_due_to_flaps</description>
       <product>
           <property>aero/qbar-psf</property>
           <property>metrics/Sw-sqft</property>
           <property>fcs/flap-pos-deg</property>
           <value> 0.01333 </value>
       </product>
    </function>

    <function name="aero/coefficient/dCLsb">
       <description>Delta_Lift_due_to_speedbrake</description>
       <product>
           <property>aero/qbar-psf</property>
           <property>metrics/Sw-sqft</property>
           <property>fcs/speedbrake-pos-norm</property>
           <value>0</value>
       </product>
    </function>

    <function name="aero/coefficient/CLde">
       <description>Lift_due_to_Elevator_Deflection</description>
       <product>
           <property>aero/qbar-psf</property>
           <property>metrics/Sw-sqft</property>
           <property>fcs/elevator-pos-rad</property>
           <value>0.2</value>
       </product>
    </function>

  </axis>

<!-- Resistencia al avance -->
  <axis name="DRAG">

    <function name="aero/coefficient/CD0">
       <description>Drag_at_zero_lift</description>
       <product>
          <property>aero/qbar-psf</property>
          <property>metrics/Sw-sqft</property>
          <table>
            <independentVar lookup="row">aero/alpha-rad</independentVar>
            <tableData>
             -1.57       1.500
             -0.26    0.023
              0.00    0.0105
              0.26    0.023
              1.57       1.500
            </tableData>
          </table>
       </product>
    </function>

    <function name="aero/coefficient/CDi">
       <description>Induced_drag</description>
         <product>
           <property>aero/qbar-psf</property>
           <property>metrics/Sw-sqft</property>
           <property>aero/cl-squared</property>
           <value>0.03</value>
         </product>
    </function>

    <function name="aero/coefficient/CDmach">
       <description>Drag_due_to_mach</description>
        <product>
          <property>aero/qbar-psf</property>
          <property>metrics/Sw-sqft</property>
          <table>
            <independentVar lookup="row">velocities/mach</independentVar>
            <tableData>
                0.00      0.000
                0.7      0.000
                1.10      0.023
                1.80      0.015
            </tableData>
          </table>
        </product>
    </function>

    <function name="aero/coefficient/CDflap">
       <description>Drag_due_to_flaps</description>
         <product>
           <property>aero/qbar-psf</property>
           <property>metrics/Sw-sqft</property>
           <property>fcs/flap-pos-deg</property>
           <value> 0.00100 </value>
         </product>
    </function>

    <function name="aero/coefficient/CDgear">
       <description>Drag_due_to_gear</description>
         <product>
           <property>aero/qbar-psf</property>
           <property>metrics/Sw-sqft</property>
           <property>gear/gear-pos-norm</property>
           <value>0.03</value>
         </product>
    </function>

    <function name="aero/coefficient/CDsb">
       <description>Drag_due_to_speedbrakes</description>
         <product>
           <property>aero/qbar-psf</property>
           <property>metrics/Sw-sqft</property>
           <property>fcs/speedbrake-pos-norm</property>
           <value>0.024</value>
         </product>
    </function>

    <function name="aero/coefficient/CDbeta">
       <description>Drag_due_to_sideslip</description>
       <product>
          <property>aero/qbar-psf</property>
          <property>metrics/Sw-sqft</property>
          <table>
            <independentVar lookup="row">aero/beta-rad</independentVar>
            <tableData>
              -1.57       1.230
              -0.26    0.050
               0.00       0.000
               0.26    0.050
               1.57       1.230
            </tableData>
          </table>
       </product>
    </function>

    <function name="aero/coefficient/CDde">
       <description>Drag_due_to_Elevator_Deflection</description>
       <product>
           <property>aero/qbar-psf</property>
           <property>metrics/Sw-sqft</property>
           <abs><property>fcs/elevator-pos-norm</property></abs>
           <value>0.04</value>
       </product>
    </function>

  </axis>

<!-- Lateral -->
  <axis name="SIDE">

    <function name="aero/coefficient/CYb">
       <description>Side_force_due_to_beta</description>
       <product>
           <property>aero/qbar-psf</property>
           <property>metrics/Sw-sqft</property>
           <property>aero/beta-rad</property>
           <value>-1</value>
       </product>
    </function>

  </axis>

<!-- Momentos -->
  <axis name="ROLL">

    <function name="aero/coefficient/Clb">
       <description>Roll_moment_due_to_beta</description>
       <product>
           <property>aero/qbar-psf</property>
           <property>metrics/Sw-sqft</property>
           <property>metrics/bw-ft</property>
           <property>aero/beta-rad</property>
           <value>-0.1</value>
       </product>
    </function>

    <function name="aero/coefficient/Clp">
       <description>Roll_moment_due_to_roll_rate</description>
       <product>
           <property>aero/qbar-psf</property>
           <property>metrics/Sw-sqft</property>
           <property>metrics/bw-ft</property>
           <property>aero/bi2vel</property>
           <property>velocities/p-aero-rad_sec</property>
           <value>-0.4</value>
       </product>
    </function>

    <function name="aero/coefficient/Clr">
       <description>Roll_moment_due_to_yaw_rate</description>
       <product>
           <property>aero/qbar-psf</property>
           <property>metrics/Sw-sqft</property>
           <property>metrics/bw-ft</property>
           <property>aero/bi2vel</property>
           <property>velocities/r-aero-rad_sec</property>
           <value>0.15</value>
       </product>
    </function>

    <function name="aero/coefficient/Clda">
       <description>Roll_moment_due_to_aileron</description>
       <product>
          <property>aero/qbar-psf</property>
          <property>metrics/Sw-sqft</property>
          <property>metrics/bw-ft</property>
          <property>fcs/left-aileron-pos-rad</property>
          <table>
            <independentVar lookup="row">velocities/mach</independentVar>
            <tableData>
              0.0    0.170
              2.0    0.057
            </tableData>
          </table>
       </product>
    </function>

    <function name="aero/coefficient/Cldr">
       <description>Roll_moment_due_to_rudder</description>
       <product>
           <property>aero/qbar-psf</property>
           <property>metrics/Sw-sqft</property>
           <property>metrics/bw-ft</property>
           <property>fcs/rudder-pos-rad</property>
           <value>0.01</value>
       </product>
    </function>

  </axis>

<!-- Momentos -->
  <axis name="PITCH">

    <function name="aero/coefficient/Cmalpha">
       <description>Pitch_moment_due_to_alpha</description>
       <product>
           <property>aero/qbar-psf</property>
           <property>metrics/Sw-sqft</property>
           <property>metrics/cbarw-ft</property>
           <property>aero/alpha-rad</property>
           <value>-0.5</value>
       </product>
    </function>

    <function name="aero/coefficient/Cmde">
       <description>Pitch_moment_due_to_elevator</description>
       <product>
          <property>aero/qbar-psf</property>
          <property>metrics/Sw-sqft</property>
          <property>metrics/cbarw-ft</property>
          <property>fcs/elevator-pos-rad</property>
          <table>
            <independentVar lookup="row">velocities/mach</independentVar>
            <tableData>
              0.0     -1.100
              2.0     -0.275
            </tableData>
          </table>
       </product>
    </function>

    <function name="aero/coefficient/Cmq">
       <description>Pitch_moment_due_to_pitch_rate</description>
       <product>
           <property>aero/qbar-psf</property>
           <property>metrics/Sw-sqft</property>
           <property>metrics/cbarw-ft</property>
           <property>aero/ci2vel</property>
           <property>velocities/q-aero-rad_sec</property>
           <value>-12</value>
       </product>
    </function>

    <function name="aero/coefficient/Cmadot">
       <description>Pitch_moment_due_to_alpha_rate</description>
       <product>
           <property>aero/qbar-psf</property>
           <property>metrics/Sw-sqft</property>
           <property>metrics/cbarw-ft</property>
           <property>aero/ci2vel</property>
           <property>aero/alphadot-rad_sec</property>
           <value>-7</value>
       </product>
    </function>

  </axis>

<!-- Momentos -->
  <axis name="YAW">

    <function name="aero/coefficient/Cnb">
       <description>Yaw_moment_due_to_beta</description>
       <product>
           <property>aero/qbar-psf</property>
           <property>metrics/Sw-sqft</property>
           <property>metrics/bw-ft</property>
           <property>aero/beta-rad</property>
           <value>0.15</value>
       </product>
    </function>

    <function name="aero/coefficient/Cnr">
       <description>Yaw_moment_due_to_yaw_rate</description>
       <product>
           <property>aero/qbar-psf</property>
           <property>metrics/Sw-sqft</property>
           <property>metrics/bw-ft</property>
           <property>aero/bi2vel</property>
           <property>velocities/r-aero-rad_sec</property>
           <value>-1.80</value>
       </product>
    </function>

    <function name="aero/coefficient/Cndr">
       <description>Yaw_moment_due_to_rudder</description>
       <product>
           <property>aero/qbar-psf</property>
           <property>metrics/Sw-sqft</property>
           <property>metrics/bw-ft</property>
           <property>fcs/rudder-pos-rad</property>
           <value>-0.1</value>
       </product>
    </function>

    <function name="aero/coefficient/Cnda">
       <description>Adverse_yaw</description>
       <product>
           <property>aero/qbar-psf</property>
           <property>metrics/Sw-sqft</property>
           <property>metrics/bw-ft</property>
           <property>fcs/left-aileron-pos-rad</property>
           <value>-0.01</value>
       </product>
    </function>

  </axis>

</aerodynamics>
 <system file="gear"/>
 <system file="fuel"/>
 <system file="brakes"/>
 <system file="automix"/>

</fdm_config>
